// COMSOL Multiphysics 6.0.0.405 model "Antireflectivity (with Angles).mph"
// Outline of the model tree

Parameters
  n_air = 1  // Refractive index of air
  n_glass = 1.5  // Refractive index of glass
  n_CeF3 = 1.63  // Refractive index of CeF3
  n_MgF2 = 1.38  // Refractive index of MgF2
  n_Zr02 = 2.2  // Refractive index of ZrO2
  lam0 = 550[nm]  // Vacuum wavelength

Geometry
  geom1 "Geometry 1" (2D, length unit m)
    sq1: Square | layername = Layer 1; layer = 0.5
    fin: Finalize "Form Union"
  pgeom_gop "Geometry" (1D, length unit m)
    pt1: Point

Materials
  mat1: Common "Material 1" on all domains
    RefractiveIndex
      n = n_air
      ki = 0
  mat2: Common "Material 2" on domains 1
    RefractiveIndex
      n = n_glass
      ki = 0

Physics
  gop: GeometricalOptics on all domains
    dependent variable q = {qx, qy, qz}
    IntensityComputation.IntensityComputation = ComputeIntensityAndPower
    WavelengthDistribution.WavelengthDistribution = PolychromaticWavelength
    MaximumSecondary.MaximumSecondary = 0
    mp1: MediumProperties (default)
    matd1: MaterialDiscontinuity (default)
      ThinDielectricFilmsOnBoundary = AddLayersToSurface
      ReleaseReflectedRays = Never
      ShowBoundaryNormal = 1
      film1: ThinDielectricFilm on all boundaries | nf = n_CeF3; tf = lam0/(4*n_CeF3)
      film2: ThinDielectricFilm on all boundaries | nf = n_MgF2; tf = lam0/(4*n_MgF2)
    op1: RayProperties | RayPropertySpecification = SpecifyVacuumWavelength; nu = 4.54e14[Hz]; lambda0 = 660[nm]; mp = 1
    relg1: ReleaseGrid "Release from Grid 1"
      x0 = {0.5, 1}
      L0 = {0, -1, 0}
      LDistributionFunction = ListOfValues
      lambda0vals = range(400[nm],(800[nm]-(400[nm]))/99,800[nm])

Mesh
  mesh1 "Mesh 1" (physics-controlled)

Studies
  std1 "Study 1"
    rtrac: RayTracing | timestepspec = specifylength; tlist = range(0,0.01,1); llist = range(0,0.01,1.1)

Solver configurations
  sol1 "Solution 1" (study std1)
    v1: Variables "Dependent Variables 1"
    t1: Time "Time-Dependent Solver 1"
      tlist = 0.0 3.33564095198e-11 6.67128190396e-11 1.00069228559e-10 1.33425638079e-10 1.66782047599e-10 2.00138457119e-10 2.33494866639e-10 2.66851276159e-10 3.00207685678e-10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
      rtol = 1.0E-5
      timemethod = genalpha
      estrat = exclude
      tstepsgenalpha = strict
      fc1: FullyCoupled | linsolver = i1; ntolfact = 0.1
      i1: Iterative
        ja1: Jacobi

Datasets
  dset1: Solution | solution = sol1
  ray1: Ray
    solution = sol1
    rgeomspec = fromphysics
    rgeom = pgeom_gop
    posdof = {comp1.qx, comp1.qy}
    physicsinterface = gop

Plots
  pg1: PlotGroup2D "Ray Trajectories (gop)" | data = ray1
    rtrj1: RayTrajectories
      col1: Color "Color Expression 1" | expr = gop.I
      filt1: RayTrajectoriesFilter "Filter 1"
  pg2: PlotGroup1D "1D Plot Group 2" | data = ray1
    rtp1: Ray1D "Ray 1" | expr = 100*(gop.relg1.Q0-gop.Q)/gop.relg1.Q0; xdata = expr; xdataexpr = gop.lambda0