// COMSOL Multiphysics 6.0.0.312 model "Glass Substrate Only.mph"
// Outline of the model tree

Selections
  sel1: Explicit "Glass substrate" on domains 1
  sel2: Explicit "Top of glass substrate" on boundaries 4

Geometry
  geom1 "Geometry 1" (3D, length unit µm)
    cyl1: Cylinder | r = 1[m]; h = 5000
    extract1: Extract "Top surface" | input = cyl1(1) boundaries 4
    fin: Finalize "Form Union"

Materials
  mat1: Common "Silica glass" on domains 1
    def "Basic"
      relpermeability = 1
      electricconductivity = 1e-14[S/m]
      thermalexpansioncoefficient = 0.55e-6[1/K]
      heatcapacity = 703[J/(kg*K)]
      relpermittivity = 3.75
      density = 2203[kg/m^3]
      thermalconductivity = 1.38[W/(m*K)]
    Enu "Young's modulus and Poisson's ratio"
      E = 73.1e9[Pa]
      nu = 0.17
    RefractiveIndex
      n = 1.45
      ki = 0

Physics
  ewfd: ElectromagneticWavesFrequencyDomain on domains 1
    dependent variable E = {Ex, Ey, Ez}
    BackgroundField.SolveFor = scatteredField
    BackgroundField.WaveType = LinearPolByAngle
    BackgroundField.angleRoll = 90[deg]
    BackgroundField.anglePitch = 90[deg]
    wee1: WaveEquationElectric (default)
    pec1: PerfectElectricConductor (default)
    init1: init "Initial Values 1" (default)
    efb1: ElectricField on boundaries 4 | E0 = {0, 5, 0}

Mesh
  mesh1 "Mesh 1" (physics-controlled)

Studies
  std1 "Study 1"
    freq: Frequency "Frequency Domain" | punit = THz; plist = c_const/1[um]