// COMSOL Multiphysics 6.0.0.405 model "Glass + Ag + PDMS (as Dielectrics).mph"
// Outline of the model tree

Parameters
  n_air = 1  // Refractive index of air
  n_glass = 1.5  // Refractive index of glass
  n_Ag = 0.13511  // Refractive index of silver (?)
  n_PDMS = 1.43  // Refractive index of PDMS
  lam0 = 550[nm]  // Vacuum wavelength

Geometry
  geom1 "Geometry 1" (2D, length unit m)
    sq1: Square | layername = Layer 1; layer = 0.5
    fin: Finalize "Form Union"
  pgeom_gop "Geometry" (1D, length unit m)
    pt1: Point

Materials
  mat1: Common "Glass" on domains 1
    RefractiveIndex
      n = n_glass
      ki = 0
  mat4: Common "Ag - Silver" (disabled) on no domains
    def "Basic"
      electricconductivity = 61.6e6[S/m]
      thermalexpansioncoefficient = 18.9e-6[1/K]
      heatcapacity = 235[J/(kg*K)]
      density = 10500[kg/m^3]
      thermalconductivity = 429[W/(m*K)]
    Enu "Young's modulus and Poisson's ratio"
      E = 83e9[Pa]
      nu = 0.37
    RefractiveIndex
      n = n_Ag
      ki = 0
  mat5: Common "PDMS - Polydimethylsiloxane" (disabled) on no domains
    def "Basic"
      thermalexpansioncoefficient = 9e-4[1/K]
      heatcapacity = 1460[J/(kg*K)]
      relpermittivity = 2.75
      density = 970[kg/m^3]
      thermalconductivity = 0.16[W/(m*K)]
    Enu "Young's modulus and Poisson's ratio"
      E = 750[kPa]
      nu = 0.49
  mat3: Common "Air" on domains 2
    RefractiveIndex
      n = n_air
      ki = 0

Physics
  gop: GeometricalOptics on all domains
    dependent variable q = {qx, qy, qz}
    IntensityComputation.IntensityComputation = ComputeIntensityAndPower
    WavelengthDistribution.WavelengthDistribution = PolychromaticWavelength
    MaximumSecondary.MaximumSecondary = 0
    mp1: MediumProperties (default) | n_mat = from_mat
    matd1: MaterialDiscontinuity (default)
      ThinDielectricFilmsOnBoundary = AddLayersToSurface
      ReleaseReflectedRays = Never
      ShowBoundaryNormal = 1
      film1: ThinDielectricFilm "Thin Dielectric Film 1 (Ag)" on all boundaries | nf = n_Ag; tf = 120[nm]
      film2: ThinDielectricFilm "Thin Dielectric Film 2 (PDMS)" on all boundaries | nf = n_PDMS; tf = 300[mm]
    op1: RayProperties | RayPropertySpecification = SpecifyVacuumWavelength; nu = 4.54e14[Hz]; lambda0 = 660[nm]; mp = 1
    relg1: ReleaseGrid "Release from Grid 1"
      x0 = {0.5, 1}
      L0 = {0, -1, 0}
      LDistributionFunction = ListOfValues
      lambda0vals = range(50[nm],(800[nm]-(50[nm]))/99,800[nm])

Mesh
  mesh1 "Mesh 1" (physics-controlled)

Studies
  std1 "Study 1"
    rtrac: RayTracing | timestepspec = specifylength; tlist = range(0,0.01,1.1); llist = range(0,0.01,1.1)

Solver configurations
  sol1 "Solution 1" (study std1)
    v1: Variables "Dependent Variables 1"
    t1: Time "Time-Dependent Solver 1"
      tlist = 0.0 3.33564095198e-11 6.67128190396e-11 1.00069228559e-10 1.33425638079e-10 1.66782047599e-10 2.00138457119e-10 2.33494866639e-10 2.66851276159e-10 3.00207685678e-10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
      rtol = 1.0E-5
      timemethod = genalpha
      estrat = exclude
      tstepsgenalpha = strict
      fc1: FullyCoupled | linsolver = i1; ntolfact = 0.1
      i1: Iterative
        ja1: Jacobi

Datasets
  dset1: Solution | solution = sol1
  ray1: Ray
    solution = sol1
    rgeomspec = fromphysics
    rgeom = pgeom_gop
    posdof = {comp1.qx, comp1.qy}
    physicsinterface = gop

Plots
  pg1: PlotGroup2D "Ray Trajectories (gop)" | data = ray1
    rtrj1: RayTrajectories
      col1: Color "Color Expression 1" | expr = gop.I
      filt1: RayTrajectoriesFilter "Filter 1"
  pg2: PlotGroup1D "Reflectance"
    data = ray1
    title = Reflectance (Glass + Ag + PDMS)
    xlabel = Vacuum Wavelength
    ylabel = Reflectance (%)
    rtp1: Ray1D "Ray 1"
      expr = 100*(gop.relg1.Q0-gop.Q)/gop.relg1.Q0
      xdata = expr
      xdataexpr = gop.lambda0
      legends = Glass+Ag+PDMS