// COMSOL Multiphysics 6.0.0.405 model "Glass+Ag (Wave Optics).mph"
// Outline of the model tree

Parameters
  n_air = 1  // Refractive index of air
  n_glass = 1.5  // Refractive index of glass
  n_CeF3 = 1.63  // Refractive index of CeF3
  lam0 = 550[nm]  // Vacuum wavelength

Geometry
  geom1 "Geometry 1" (2D, length unit m)
    sq1: Square | layername = {Layer 1, Layer 2}; layer = {100000[nm], 100000[nm]}
    fin: Finalize "Form Union"
  pgeom_gop "Geometry" (1D, length unit m)
    pt1: Point

Materials
  mat1: Common "Silica glass" on domains 1
    def "Basic"
      relpermeability = 1
      electricconductivity = 1e-14[S/m]
      thermalexpansioncoefficient = 0.55e-6[1/K]
      heatcapacity = 703[J/(kg*K)]
      relpermittivity = 3.75
      density = 2203[kg/m^3]
      thermalconductivity = 1.38[W/(m*K)]
    Enu "Young's modulus and Poisson's ratio"
      E = 73.1e9[Pa]
      nu = 0.17
    RefractiveIndex
      n = 1.45
      ki = 0
  mat2: Common "Ag (Silver) (Choi et al. 2020: n,k 1.23-6.99 um)" on domains 2
    RefractiveIndex
      n = nr(c_const/freq)
      ki = ni(c_const/freq)
      int1: Interpolation
        funcname = nr
        table = 
          {1.231, 0.169}
          {1.243, 0.173}
          {1.256, 0.176}
          {1.269, 0.179}
          {1.282, 0.183}
          {1.295, 0.187}
          {1.309, 0.191}
          {1.323, 0.195}
          {1.337, 0.199}
          {1.352, 0.203}
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        fununit = 1
        argunit = um
      int2: Interpolation
        funcname = ni
        table = 
          {1.231, 8.852}
          {1.243, 8.946}
          {1.256, 9.041}
          {1.269, 9.137}
          {1.282, 9.235}
          {1.295, 9.336}
          {1.309, 9.439}
          {1.323, 9.543}
          {1.337, 9.650}
          {1.352, 9.760}
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        fununit = 1
        argunit = um
  mat3: Common "Air" on domains 3
    def "Basic"
      thermalexpansioncoefficient = alpha_p(pA,T)
      molarmass = 0.02897[kg/mol]
      bulkviscosity = muB(T)
      dynamicviscosity = eta(T)
      ratioofspecificheat = 1.4
      electricconductivity = 0[S/m]
      heatcapacity = Cp(T)
      density = rho(pA,T)
      thermalconductivity = k(T)
      soundspeed = cs(T)
      eta: Piecewise | arg = T; pieces = {200.0, 1600.0, -8.38278E-7+8.35717342E-8*T^1-7.69429583E-11*T^2+4.6437266E-14*T^3-1.06585607E-17*T^4}; argunit = K; fununit = Pa*s
      Cp: Piecewise | arg = T; pieces = {200.0, 1600.0, 1047.63657-0.372589265*T^1+9.45304214E-4*T^2-6.02409443E-7*T^3+1.2858961E-10*T^4}; argunit = K; fununit = J/(kg*K)
      rho: Analytic | expr = pA*0.02897/R_const[K*mol/J]/T; args = {pA, T}; dermethod = manual; argders = {{pA, d(pA*0.02897/R_const/T,pA)}, {T, d(pA*0.02897/R_const/T,T)}}; fununit = kg/m^3; argunit = {Pa, K}
      k: Piecewise | arg = T; pieces = {200.0, 1600.0, -0.00227583562+1.15480022E-4*T^1-7.90252856E-8*T^2+4.11702505E-11*T^3-7.43864331E-15*T^4}; argunit = K; fununit = W/(m*K)
      cs: Analytic | expr = sqrt(1.4*R_const[K*mol/J]/0.02897*T); args = T; dermethod = manual; fununit = m/s; argunit = K
      an1: Analytic | funcname = alpha_p; expr = -1/rho(pA,T)*d(rho(pA,T),T); args = {pA, T}; fununit = 1/K; argunit = {Pa, K}
      an2: Analytic "Analytic 2a" | funcname = muB; expr = 0.6*eta(T); args = T; fununit = Pa*s; argunit = K
    NonlinearModel
      BA = (def.gamma+1)/2
    idealGas
      Rs = R_const/Mn
      heatcapacity = Cp(T)
      ratioofspecificheat = 1.4
      molarmass = 0.02897
      Cp: Piecewise | arg = T; pieces = {200.0, 1600.0, 1047.63657-0.372589265*T^1+9.45304214E-4*T^2-6.02409443E-7*T^3+1.2858961E-10*T^4}; argunit = K; fununit = J/(kg*K)
    RefractiveIndex
      n = 1
      ki = 0

Physics
  ewfd: ElectromagneticWavesFrequencyDomain on all domains
    dependent variable E = {Ex, Ey, Ez}
    wee1: WaveEquationElectric (default)
    pec1: PerfectElectricConductor (default)
    init1: init "Initial Values 1" (default)
  gop: GeometricalOptics (disabled) on all domains
    dependent variable q = {qx, qy, qz}
    mp1: MediumProperties (default)
    matd1: MaterialDiscontinuity (default)
    op1: RayProperties | RayPropertySpecification = SpecifyVacuumWavelength; nu = 4.54e14[Hz]; lambda0 = 660[nm]; mp = 1

Mesh
  mesh1 "Mesh 1" (physics-controlled)

Studies
  std1 "Study 1"
    wave: Wavelength "Wavelength Domain" | plist = 1[um]